*Heading
** Job name: Job-1 Model name: Model-1
** Generated by: Abaqus/CAE 6.14-1
*Preprint, echo=NO, model=NO, history=NO, contact=NO
**
** PARTS
**
*Part, name=Part-1
*End Part
**
**
** ASSEMBLY
**
*Assembly, name=Assembly
**
*Instance, name=Part-1-1, part=Part-1
*Node
      1,   0.45924443, -0.268892288,           0.
      2,   1.22201025,  -1.02789748,           0.
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*Element, type=C3D6
1, 201, 206, 209, 421, 426, 429
2, 182, 186, 200, 402, 406, 420
*Element, type=C3D8R
  3,  80,  91,  53,  52, 300, 311, 273, 272
  4,  81,  89,  50,  49, 301, 309, 270, 269
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*End Instance
**
*End Assembly
**
** MATERIALS
**
*Material, name=steel
*Density
7800.,
*Elastic
 2.07e+06, 0.03
